Mon Apr 15 15:03:40 CEST 2024
;; 1. Based on: EPAR
;; 2. Description: 1 cmpt with addi+prop error
;; x1. Author: u0137111
$PROBLEM
$INPUT      ID STUDY WEEK TIME TAD EVID MDV AMT RATE CMT DV LNCONC LOQ
            OCC OCC_DOSETYPE ATI_titer ATI_CAT ATI_OVERALL NAB_CAT BWT
            BMI AGE SEX ALB CRP WBC HB PLT LYM COIMMU
            CO_STEROID_BASELINE CO_STEROID DIS_DUR DISEASE
$DATA      IFX_SC_PK_NONMEM_reduced_BLOQ.csv IGNORE=@
$SUBROUTINE ADVAN13 TOL=9
$MODEL      NCOMP=3 COMP=(DEPOT) ; Absorption compartment
            COMP=(CENTRAL) ; Central compartment
            COMP=(AUC) ; For calculating AUC
$PK
A_0(1)= 0

TVF1 = THETA(1)
F1   = TVF1* EXP(ETA(1))

;absorption
TVKA = THETA(2)
KA   = TVKA* EXP(ETA(2))

;Elimination
TVCL = THETA(3)
CL   = TVCL*EXP(ETA(3))

;distribution
TVV1 = THETA(4)
V1   = TVV1*EXP(ETA(4))

S1  = V1
KE  = CL/V1

$DES
DADT(1) = -KA*A(1)
DADT(2) =  KA*A(1) -KE*A(2)
DADT(3) =  A(2)/V1

$ERROR
AUC   = A(3)
IPRED = F
IRES  = DV - IPRED
W     = SQRT((THETA(5)*IPRED)**2 + THETA(6)**2)
IF (W.EQ.0) W = 1
IWRES = IRES/W

LLOQ=0.1
IF (DV.GE.LLOQ) THEN
   F_FLAG = 0
   Y      = IPRED + EPS(1)*W
ELSE
   F_FLAG = 1
   Y      = PHI((LLOQ-IPRED)/W)
ENDIF

IF (ICALL.EQ.4) THEN
Y = IPRED +  EPS(1)*W
END IF

$THETA  (0,0.576,1) ; 1 F
 (0,0.21648) ; 2 KA
 (0,0.3024) ; 3 CL
 (0,2.89) ; 4 V1
 (0,0.353) ; 5 PROP ERROR
 (0,0.300) ; 6 ADDI ERROR
$OMEGA  0.05  ;    1. omF1
 0.05  ;    2. omKA
 0.05  ;    3. omCL
 0.05  ;    5. omV1
$SIGMA  1  FIX
$ESTIMATION METHOD=1 INTER LAPLACIAN NUMERICAL MAXEVAL=9999
            SADDLE_RESET=1 SIGL=9 NSIG=3
$COVARIANCE Matrix=S PRINT=E
$TABLE      ID STUDY TIME IPRED IWRES CWRES NOPRINT ONEHEADER
            FILE=sdtab1
$TABLE      ID ATI_titer ATI_CAT ATI_OVERALL NAB_CAT BWT BMI AGE SEX
            ALB CRP WBC HB PLT LYM COIMMU CO_STEROID_BASELINE
            CO_STEROID DIS_DUR DISEASE NOPRINT NOAPPEND ONEHEADER
            FILE=cotab1
$TABLE      ID ATI_CAT ATI_OVERALL NAB_CAT SEX COIMMU
            CO_STEROID_BASELINE CO_STEROID DIS_DUR DISEASE NOPRINT
            NOAPPEND ONEHEADER FILE=catab1
$TABLE      ID F1 KA CL V1 NOPRINT NOAPPEND ONEHEADER FILE=patab1
$TABLE      ID STUDY WEEK TIME TAD EVID MDV AMT RATE CMT DV LNCONC LOQ
            OCC OCC_DOSETYPE ATI_titer ATI_CAT ATI_OVERALL NAB_CAT BWT
            BMI AGE SEX ALB CRP WBC HB PLT LYM COIMMU
            CO_STEROID_BASELINE CO_STEROID DIS_DUR DISEASE F1 KA CL V1
            PRED IPRED AUC IWRES CWRES NOPRINT NOAPPEND ONEHEADER
            FILE=fulltab1

NM-TRAN MESSAGES
 WARNINGS AND ERRORS (IF ANY) FOR PROBLEM    1
 (WARNING  2) NM-TRAN INFERS THAT THE DATA ARE POPULATION.
 (WARNING  90) WITH "NUMERICAL", "SLOW" IS ALSO REQUIRED ON $ESTIM RECORD.
 NM-TRAN HAS SUPPLIED THIS OPTION.
 (WARNING  27) THE ABBREVIATED CODE CONTAINS A SIMULATION BLOCK BUT THERE IS
 NO $SIMULATION RECORD.

1NONLINEAR MIXED EFFECTS MODEL PROGRAM (NONMEM) VERSION 7.5.0
 ORIGINALLY DEVELOPED BY STUART BEAL, LEWIS SHEINER, AND ALISON BOECKMANN
 CURRENT DEVELOPERS ARE ROBERT BAUER, ICON DEVELOPMENT SOLUTIONS,
 AND ALISON BOECKMANN. IMPLEMENTATION, EFFICIENCY, AND STANDARDIZATION
 PERFORMED BY NOUS INFOSYSTEMS.
 PROBLEM NO.:         1

 TOT. NO. OF OBS RECS:     7351
 TOT. NO. OF INDIVIDUALS:      432
 GENERAL NONLINEAR KINETICS MODEL WITH STIFF/NONSTIFF EQUATIONS (LSODA, ADVAN13)
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 #TBLN:      1
 #METH: Laplacian Conditional Estimation with Interaction
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
 #TERM:
0MINIMIZATION SUCCESSFUL
 HOWEVER, PROBLEMS OCCURRED WITH THE MINIMIZATION.
 REGARD THE RESULTS OF THE ESTIMATION STEP CAREFULLY, AND ACCEPT THEM ONLY
 AFTER CHECKING THAT THE COVARIANCE STEP PRODUCES REASONABLE OUTPUT.
 NO. OF FUNCTION EVALUATIONS USED:      955
 NO. OF SIG. DIGITS IN FINAL EST.:  3.4

 ETABAR IS THE ARITHMETIC MEAN OF THE ETA-ESTIMATES,
 AND THE P-VALUE IS GIVEN FOR THE NULL HYPOTHESIS THAT THE TRUE MEAN IS 0.

 ETABAR:        -1.4722E-02  2.3350E-02  1.6551E-02 -2.1557E-03
 SE:             1.3985E-02  1.9646E-02  1.2402E-02  1.6152E-03
 N:                     432         432         432         432

 P VAL.:         2.9246E-01  2.3463E-01  1.8200E-01  1.8200E-01

 ETASHRINKSD(%)  1.6694E+01  2.5756E+01  1.3257E+01  6.8695E+01
 ETASHRINKVR(%)  3.0601E+01  4.4878E+01  2.4756E+01  9.0200E+01
 EBVSHRINKSD(%)  2.1729E+01  2.5684E+01  1.9801E+01  7.1057E+01
 EBVSHRINKVR(%)  3.8736E+01  4.4772E+01  3.5681E+01  9.1623E+01
 RELATIVEINF(%)  5.4192E+01  5.0838E+01  1.0000E-10  1.0000E-10
 EPSSHRINKSD(%)  8.4699E+00
 EPSSHRINKVR(%)  1.6222E+01


 TOTAL DATA POINTS NORMALLY DISTRIBUTED (N):         7146
 N*LOG(2PI) CONSTANT TO OBJECTIVE FUNCTION:    13133.469516561181
 OBJECTIVE FUNCTION VALUE WITHOUT CONSTANT:    31336.573065240678
 OBJECTIVE FUNCTION VALUE WITH CONSTANT:       44470.042581801856
 REPORTED OBJECTIVE FUNCTION DOES NOT CONTAIN CONSTANT

 TOTAL EFFECTIVE ETAS (NIND*NETA):                          1626


 #TERE:
 Elapsed estimation  time in seconds:  3208.97
 Elapsed covariance  time in seconds:    71.63
 Elapsed postprocess time in seconds:     5.11

 ********************                LAPLACIAN CONDITIONAL ESTIMATION WITH INTERACTION               ********************
 #OBJT:**************                       MINIMUM VALUE OF OBJECTIVE FUNCTION                      ********************
 #OBJV:********************************************    31336.573       **************************************************

 ********************                LAPLACIAN CONDITIONAL ESTIMATION WITH INTERACTION               ********************
 ********************                             FINAL PARAMETER ESTIMATE                           ********************

 THETA - VECTOR OF FIXED EFFECTS PARAMETERS   *********
         TH 1      TH 2      TH 3      TH 4      TH 5      TH 6
         2.12E-01  1.67E-01  2.81E-01  2.55E+00  3.60E-01  3.15E-01

 OMEGA - COV MATRIX FOR RANDOM EFFECTS - ETAS  ********
         ETA1      ETA2      ETA3      ETA4
 ETA1
+        1.22E-01
 ETA2
+        0.00E+00  3.03E-01
 ETA3
+        0.00E+00  0.00E+00  8.85E-02
 ETA4
+        0.00E+00  0.00E+00  0.00E+00  1.15E-02

 SIGMA - COV MATRIX FOR RANDOM EFFECTS - EPSILONS  ****
         EPS1
 EPS1
+        1.00E+00

 OMEGA - CORR MATRIX FOR RANDOM EFFECTS - ETAS  *******
         ETA1      ETA2      ETA3      ETA4
 ETA1
+        3.49E-01
 ETA2
+        0.00E+00  5.51E-01
 ETA3
+        0.00E+00  0.00E+00  2.97E-01
 ETA4
+        0.00E+00  0.00E+00  0.00E+00  1.07E-01

 SIGMA - CORR MATRIX FOR RANDOM EFFECTS - EPSILONS  ***
         EPS1
 EPS1
+        1.00E+00

 ********************                LAPLACIAN CONDITIONAL ESTIMATION WITH INTERACTION               ********************
 ********************                            STANDARD ERROR OF ESTIMATE                          ********************

 THETA - VECTOR OF FIXED EFFECTS PARAMETERS   *********
         TH 1      TH 2      TH 3      TH 4      TH 5      TH 6
         4.92E-03  6.49E-03  1.39E+00  1.26E+01  1.21E-03  1.54E-02

 OMEGA - COV MATRIX FOR RANDOM EFFECTS - ETAS  ********
         ETA1      ETA2      ETA3      ETA4
 ETA1
+        7.24E-03
 ETA2
+       .........  2.65E-02
 ETA3
+       ......... .........  6.77E-01
 ETA4
+       ......... ......... .........  6.76E-01

 SIGMA - COV MATRIX FOR RANDOM EFFECTS - EPSILONS  ****
         EPS1
 EPS1
+       .........

 OMEGA - CORR MATRIX FOR RANDOM EFFECTS - ETAS  *******
         ETA1      ETA2      ETA3      ETA4
 ETA1
+        1.04E-02
 ETA2
+       .........  2.41E-02
 ETA3
+       ......... .........  1.14E+00
 ETA4
+       ......... ......... .........  3.15E+00

 SIGMA - CORR MATRIX FOR RANDOM EFFECTS - EPSILONS  ***
         EPS1
 EPS1
+       .........
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
 ********************                LAPLACIAN CONDITIONAL ESTIMATION WITH INTERACTION               ********************
 ********************                      EIGENVALUES OF COR MATRIX OF ESTIMATE                     ********************

             1         2         3         4         5         6         7         8         9        10
         6.37E-06  7.00E-05  4.28E-01  7.11E-01  7.73E-01  1.07E+00  1.26E+00  1.66E+00  1.88E+00  2.23E+00
 Elapsed finaloutput time in seconds:     2.19
 #CPUT: Total CPU Time in Seconds,     6474.605
